// SBML level 3 version 2

model mTOR_Signaling_Model()
  // Dynamic mTOR Signaling Network

  // Compartments:
  compartment cell = 1;

  // Species:
  species mTORC1 in cell = 1;
  species mTORC2 in cell = 1;
  species DEPTOR in cell = 1;
  species Akt in cell = 1;
  species TSC1_2 in cell = 1;

  // Parameters:
  k1 = 0.5;
  k2 = 0.5;
  k3 = 0.5;
  k4 = 0.5;
  k5 = 0.5;

  // Reactions:
  inhibition_mTORC1_by_DEPTOR: DEPTOR + mTORC1 => DEPTOR_mTORC1_complex; k1*DEPTOR*mTORC1;
  inhibition_mTORC2_by_DEPTOR: DEPTOR + mTORC2 => DEPTOR_mTORC2_complex; k2*DEPTOR*mTORC2;
  degradation_DEPTOR_by_mTORC1: mTORC1 + DEPTOR => ; k3*mTORC1*DEPTOR;
  activation_mTORC1_by_Akt: Akt + TSC1_2 => ; k4*Akt*TSC1_2;
  phosphorylation_TSC1_2_by_mTORC1: mTORC1 + TSC1_2 => ; k5*mTORC1*TSC1_2;
end
