// SBML level 3 version 2

model RepressilatorModel()
  // Synthetic Oscillatory Network of Transcriptional Regulators

  // Compartments:
  compartment cell = 1;

  // Species:
  species TetR in cell = 0;
  species LacI in cell = 0;
  species cI in cell = 0;
  species mRNA_TetR in cell = 0;
  species mRNA_LacI in cell = 0;
  species mRNA_cI in cell = 0;

  // Parameters:
  alpha = 50;
  alpha0 = 0.01;
  beta = 5;
  n = 2;
  Km = 40;
  gamma_m = 0.1;
  gamma_p = 0.1;

  // Reactions:
  transcription_TetR: => mRNA_TetR; (alpha + alpha0/LacI^n)/(1 + LacI^n);
  transcription_LacI: => mRNA_LacI; (alpha + alpha0/cI^n)/(1 + cI^n);
  transcription_cI: => mRNA_cI; (alpha + alpha0/TetR^n)/(1 + TetR^n);
  translation_TetR: mRNA_TetR => TetR; beta*mRNA_TetR;
  translation_LacI: mRNA_LacI => LacI; beta*mRNA_LacI;
  translation_cI: mRNA_cI => cI; beta*mRNA_cI;
  degradation_mRNA_TetR: mRNA_TetR => ; gamma_m*mRNA_TetR;
  degradation_mRNA_LacI: mRNA_LacI => ; gamma_m*mRNA_LacI;
  degradation_mRNA_cI: mRNA_cI => ; gamma_m*mRNA_cI;
  degradation_TetR: TetR => ; gamma_p*TetR;
  degradation_LacI: LacI => ; gamma_p*LacI;
  degradation_cI: cI => ; gamma_p*cI;
end
